# AguaClara Water Treatment Plants
# Automated Design
# User Inputs:
# Design References
# [reference: userinputs.xmcd]
# [reference: DesignAssumptions.xmcd]
# [reference: MathFunctions.xmcd]
# [reference: PipeDatabase.xmcd]
# [reference: MinorLossCoefficients.xmcd]
# [reference: FluidsFunctions.xmcd]
# [reference: Channel.xmcd]
W_Channel = 0.199786 m
L_Channel = 3.45 m
ND_SedPipeEntrance = 6 in
# [reference: Sedimentation.xmcd]
H_SedBelowSlope = 0.866025 m
H_SedBelowStraight = 0.133975 m
H_SedAbove = 0.25 m
H_SedPlate = 0.779423 m
HW_Sed = 2.02942 m
H_SedTank = 2.12942 m
Z_Mp = 1.42942 m
L_SedTank = 4.48442 m
L_SedTankPlates = 3.58304 m  # Length of tank occupied by plate settlers (not including angled section)
N_SedPlates = 63
V_SedC = 9.90251 m/day
V_SedUp = 69.039 m/day
# [reference: FCM.xmcd]
N_Fcm = 2
ID_FcmTube = 0.125 in
ID_FcmTube = 3.175 mm
L_FcmTube = 116.725 cm
Q_FcmTubeMax = 241.875 mL/min
HL_FcmValve = 4.31402 cm
# [reference: Flocculation.xmcd]
W_FlocChannel = 0.5 m
B_FlocBaffle = [0.148245; 0.201366; 0.399068] m
S_FlocBaffle = [0.128245; 0.181366; 0.379068] m
N_FlocBafflesMin = 28
X_FlocBaffle = [
    0.2286, 4.09035;
    0.376845, 3.69129;
    0.52509, 3.29222;
    0.673335, 2.89315;
    0.82158, 2.49408;
    0.969825, 2.09501;
    1.11807, 1.69594;
    1.26631, 1.29688;
    1.41456, 0.897808;
    1.61592, 0.49874;
    1.81729, 0;
    2.01866, 0;
    2.22002, 0;
    2.42139, 0;
    2.62275, 0;
    2.82412, 0;
    3.02548, 0;
    3.42455, 0;
    3.82362, 0
] m
HL_Floc = 6.2957 cm
HW_FlocStart = 2.09238 m
L_FlocBaffle = [
    1.83706, 1.46082;
    2.00001, 1.62378;
    1.83706, 1.46082;
    2.00001, 1.62378;
    1.83706, 1.46082;
    2.00001, 1.62378;
    1.83706, 1.46082;
    2.00001, 1.62378;
    1.83706, 1.46082;
    1.92033, 1.62378;
    1.75737, 0;
    1.92033, 0;
    1.75737, 0;
    1.92033, 0;
    1.75737, 0;
    1.92033, 0;
    1.75737, 0;
    1.62378, 0;
    1.46082, 0
] m
W_FlocPort = 0.379068 m
H_FlocPort = 0.75 m
N_FlocBaffles = 29
Z_FlocBaffle = [
    0, 0;
    0.192367, 0.568602;
    0, 0;
    0.192367, 0.568602;
    0, 0;
    0.192367, 0.568602;
    0, 0;
    0.192367, 0.568602;
    0, 0;
    0.272049, 0.568602;
    0, 0;
    0.272049, 0;
    0, 0;
    0.272049, 0;
    0, 0;
    0.272049, 0;
    0, 0;
    0.568602, 0;
    0, 0
] m
Gt_FlocMinFlow = 5207.9
# [reference: EntranceTank.xmcd]
ND_Lfom = 6 in
HL_Rm = 12.0621 cm
N_Lfom = 2
D_LfomOrifice = 17 mm
N_LfomOrifices = [5; 4; 3; 2; 3; 1; 1; 2; 1; 2]
Q_LfomErrorMax = 1.37663 %
L_Et = 1.04775 m
W_Et = 1.04775 m
HW_Et = 1.27783 m
H_Et = 1.37783 m
# [reference: Launder.xmcd]
N_SedLaunderOrifices = 70
Q_SedLaunderOrifices = 3.07143 L/min
Z_SedLaunder = 1.90442 m
ND_SedLaunder = 6 in
D_SedLaunderOrifices = 9 mm
# [reference: PlantLevelTank.xmcd]
HW_Plt =  # error: This variable is undefined.
ND_PltWeir =  # error
H_PltWeir =  # error
L_Plt =  # error
W_Plt =  # error
# [reference: SludgeDrain.xmcd]
N_SludgeOrifices = 44
ND_SludgeDrain = 3 in
Q_SludgeDrainInitial = 606.719 L/min
D_SludgeOrifice = 5 mm
# Any additional needed elevations should be calculated in the files above.
# AutoCAD References
# [reference: basics.xmcd]
# [reference: inputs.xmcd]
# [reference: tank.xmcd]
# [reference: lamina.xmcd]
# [reference: cross.xmcd]
# [reference: Tee.xmcd]
# [reference: elbow.xmcd]
# [reference: pipe.xmcd]
# [reference: pipe.no_zoom.xmcd]
# [reference: Sludge.xmcd]
# [reference: Channel.xmcd]
# [reference: Manifold.xmcd]
# [reference: SedTankslopes.xmcd]
# [reference: floctank.xmcd]
# [reference: EntranceTank.xmcd]
# [reference: platform.xmcd]
# [reference: PlantLevelTank.xmcd]
# [reference: SedTank.xmcd]
# [reference: alumstock.xmcd]
# [reference: chlorinestock.xmcd]
