# AguaClara Design Tool
# [reference: BasicClientInputs.xmcd]
# [reference: ExpertClientInputs.xmcd]
# [reference: DesignAssumptions.xmcd]
# [reference: MathFunctions.xmcd]
# [reference: PipeDatabase.xmcd]
# [reference: MinorLossCoefficients.xmcd]
# [reference: FluidsFunctions.xmcd]
# [reference: Sedimentation Tank.xmcd]
# [reference: Floc Hopper.xmcd]
# [reference: FCM.xmcd]
# [reference: Flocculation Energy Dissapation.xmcd]
# [reference: RapidMixer.xmcd]
# [reference: Materials List.xmcd]
# [reference: EntranceTankDim.xmcd]
# [reference: AutoCADMasterProgram.xmcd]
# This file must have at least one variable displayed otherwise it doesn't recalculate and it claims that all variables are undefined.
H_SedFrameWall = 0.07 m
EN_DrillSeries = 1
EN_PipeSpec = 4
L_Sed = 9.52822 m
EN_FcmTube = 0
AC_SedTank = [
    "_-view o t"; "-layer m tank"; "c t 132,132,132"; "tank"; "  "; "_-view o t _zoom w 0.16,-0.16,0 -9.68822,2.319,1.76127 _box 0,0,0 -9.52822,2.159,1.76127 _box 0.15,-0.15,-0.15 -9.67822,2.309,1.76127 _subtract 0.15,-0.15,-0.15  0,0,0 "; "-layer s 0"; "  "; "-layer f tank"; "  "
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]
AC_FlocTank = [
    "-layer m floctank"; "c t 91,91,91"; "floctank"; "  "; "_-view o t _zoom w 0.16,6.767,0 -9.68822,12.29254,2.01813 _box 0,6.927,0 -9.52822,12.13254,2.01813 _box 0.15,6.777,-0.15 -9.67822,12.28254,2.01813 _subtract 0.15,6.777,-0.15  0,6.927,0 "; "-layer s 0"; "  "; "-layer f floctank"; "  "; "-layer m floctankwall"
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]
AC_EntranceTank = [
    "-layer m entrancetank";
    "c t 214,214,214";
    "entrancetank";
    "  ";
    "_-view o t _zoom w 0.16,12.12254,0 -9.68822,13.09024,2.31813 _box 0,12.28254,0 -9.52822,12.93024,2.31813 _box 0.15,12.13254,-0.15 -9.67822,13.08024,2.31813 _subtract 0.15,12.13254,-0.15  0,12.28254,0 ";
    "-layer s 0";
    "  ";
    "-layer f entrancetank";
    "  ";
    "-layer s entrancetank";
    "  ";
    "_box -0.32801,12.13254,2.26813 0,12.28254,2.31813";
    "-layer s 0";
    "  ";
    "-layer t entrancetank";
    "  ";
    "_-view o t";
    "_subtract 0.15,12.28254,0  -0.32801,12.13254,2.26813 ";
    "-layer f entrancetank";
    "  "
]
# [component: inputs AC_EntranceTank]
