# AguaClara Water Treatment Plants
# Automated Design
# Add variable descriptions next to every varible so it is easy to interpret what this all means.
# Design References
# MathCAD dimension calculations:
# [reference: BasicInputs.xmcd]
# Use BasicClientInputs and ExpertClientInputs when this is run by LabVIEW.
# Use BasicInputs and ExpertInputs to use the program in MathCAD
# Change the reference by
# - right clicking
# - select properties
# - reference tab
# - type in the correct file name
# [reference: ExpertInputs.xmcd]
# [reference: DesignAssumptions.xmcd]
# [reference: MathFunctions.xmcd]
# [reference: PipeDatabase.xmcd]
# [reference: MinorLossCoefficients.xmcd]
# [reference: FluidsFunctions.xmcd]
# [reference: Sedimentation Tank.xmcd]
# [reference: Flocculator.xmcd]
# [reference: Rapid Mix.xmcd]
# [reference: LFOM.xmcd]
# [reference: EntranceTankDim.xmcd]
# [reference: LinearCdc_app37.xmcd]
# [reference: ChemStorageCylinders.xmcd]
# [reference: Materials List.xmcd]
# [reference: Stacked RSF.xmcd]
# AutoCAD drawing programs:
# Translators:
# These are the codes that take MathCAD outputs and create AutoCAD scripts that are used to draw the plant (formerly Basics)
# [reference: MtoATranslators.xmcd]
# The wrapped MtoA translator contains the functions that the user will want to access. These functions will draw pieces with full functionality - specifying the location, dimension, and orientation of the object. Also, it contains layer control and subtraction capabilities for grouped objects.
# [reference: MtoATranslators Wrapped.xmcd]
# Plant Elements:
# These are all of the files that draw the fundamental parts of the plants (tees, elbows, tanks, pipes, etc)
# [reference: Channel.xmcd]
# [reference: cross.xmcd]
# [reference: Sludge.xmcd]
# [reference: Manifold.xmcd]
# [reference: pipe.xmcd]
# [reference: elbow.xmcd]
# [reference: Tee.xmcd]
# [reference: tank.xmcd]
# [reference: lamina.xmcd]
# [reference: adapter.xmcd]
# [reference: Tee2.xmcd]
# [reference: pvccap.xmcd]
# [reference: LaunderCap.xmcd]
# [reference: ChimneyStops.xmcd]
# [reference: laminaplain.xmcd]
# [reference: Stairs.xmcd]
# [reference: DrainChannel.xmcd]
# [reference: Manifold.xmcd]
# Specific Pieces:
# These are the codes that draw the bigger pieces of the plant (the sed tank, floc tank, etc)
# [reference: floctank.xmcd]
# [reference: chlorinestock.xmcd]
# [reference: SedTank- with pieces.xmcd]
# [reference: Entrance Tank.xmcd]
# [reference: AlumstockCylinder.xmcd]
# [reference: Plant Drain Channel.xmcd]
# [reference: Operator Access.xmcd]
# [reference: Stacked RSF.xmcd]
# Layouts:
# This file will execute at the very end to create multiple views of the entire plant in paperspace
# [reference: Layouts.xmcd]
# Sed Tanks and Slopes:
N_SedTanks = 4
H_SedBetween = 0 cm  # Distance from the top of the inlet manifold to the bottom of the ledge supporting the lamella frame
L_Sed = 3.50406 m
N_SedBays = 1  # Number of bays of inlet manifolds in each sed tank
# Length of the port through which water exits the inlet manifold
# Width of ferrous cement plates in whice one manifold port is cut
Q_SedBay = 3 L/s
# Sedimentation Tank Sludge Drain:
N_SedSludgeOrifices = 35  # per cell
Ti_SludgeDrain = 30 min  # Tank Drain time
W_SedSludge = 9.62872 cm  # Width of the sludge channel
B_SedSludgeOrifices = 10 cm  # Distance center to center between drain orifices
H_SedSludge = 4.81436 cm  # Depth of the sludge channel
T_SedSludge = 5 cm
T_SedSludge = 5 cm
# Thickness of the plate topping the sludge channel
# through which drain holes are formed
W_SedDrainCover = 19.6287 cm
D_SedSludgeOrifice = 0.011 m  # Diameter of drain orifices
W_SedInletBottom = 0.441856 m
N_SedSludgeOrifices = 35
ND_SedSludgeValve = 2 in
# Sedimentation Tank Dimensions:
Z_SedSludge = 0.0981436 m  # Height from 0 of the top of the sludge drain
Z_SedSlopes = 0.82016 m  # Height from 0 of the top of the inlet manifold
W_Sed = 1.08 m  # Total tank wall height
L_Sed = 3.50406 m  # Total tank length
# Inlet Channel:
HW_InletChannel = 0.255898 m  # Width of the drop chimneys connecting channel to sed inlet manifolds
W_InletChannel = 0.411838 m  # length of drop chimmneys
L_Channel = 5.07 m
N_SedInletPipes = 2  # per sed bay
H_InletChannel = 0.355898 m
# Sedimentation Tank Effluent Launder:
N_SedLaunderOrifices = 44  # Number of orifices per launder
Q_SedLaunderOrifices = 7.12572e-5 m^3/s  # More Launder Dimensions
ND_SedLaunder = 4 in
B_SedLaunderOrifices = 0.100796 m  # Center to center launder spacing
L_SedLaunder = 2.36112 m
# Exit Channel:
D_SedLaunderOrifice = 0.511811 in
W_ExitChannel = 0.373167 m
H_ExitChannel = 0.355898 m
L_ExitChannel = 5.07 m
H_PltWeir = 0.265898 m  # height of the weir carrying water to the distribution tank
HW_ExitChannel = 0.215898 m  # water height in exit channel from 0
# Lamella:
L_SedPlate = 0.609667 m
B_SedPlate = 2.84167 cm  # center to center distance between lamella
S_SedPlate = 2.64167 cm  # spacing between lamella
N_SedPlates = 70  # Number of Sed Plates per Sedimentation Tank Bay.
AN_SedPlate = 60 deg
V_SedC = 10.2243 m/day
L_SedActive = 2.29689 m
T
V_SedUp = 68.4919 m/day
Z_SedLaunder = 1.54356 m
H_SedPlate = 0.527987 m
H_SedAbove = 0.151323 m  # Height of water needed above the lamella
N_SedPlates = 70
HW_Sed = 1.63773 m
H_Sed = 1.73773 m
Z_Mp = 1.38183 m
H_SedBayDivider = 0.82016 m
# Flocculator: | Look at Flocculator Positioning arrays
W_FlocChannel = 0.54 m
# Fill last channel with bafffles from last channel
# Fix port width to be based on energy dissipation in that channel
ED_Floc = 6 mW/kg
# Adjust spacing after the number of baffles per channel is known.
# Check the residence time of the flocculator should be at least 20minutes
HW_FlocEnd = 1.63773 m
X_FlocBaffles = [
    0.191303, 0.191303, 0.191303, 0.191303, 0.275898;
    0.364606, 0.364606, 0.364606, 0.364606, 0.454419;
    0.53791, 0.53791, 0.53791, 0.53791, 0.632941;
    0.711213, 0.711213, 0.711213, 0.711213, 0.811462;
    0.884516, 0.884516, 0.884516, 0.884516, 0.989983;
    1.05782, 1.05782, 1.05782, 1.05782, 1.1685;
    1.23112, 1.23112, 1.23112, 1.23112, 1.34703;
    1.40443, 1.40443, 1.40443, 1.40443, 1.52555;
    1.57773, 1.57773, 1.57773, 1.57773, 1.70407;
    1.75103, 1.75103, 1.75103, 1.75103, 1.88259;
    1.92434, 1.92434, 1.92434, 1.92434, 2.06111;
    2.09764, 2.09764, 2.09764, 2.09764, 2.23963;
    2.27094, 2.27094, 2.27094, 2.27094, 2.41815;
    2.44425, 2.44425, 2.44425, 2.44425, 2.59668;
    2.61755, 2.61755, 2.61755, 2.61755, 2.7752;
    2.79085, 2.79085, 2.79085, 2.79085, 2.95372;
    2.96415, 2.96415, 2.96415, 2.96415, 3.13224;
    3.13746, 3.13746, 3.13746, 3.13746, 3.31076;
    3.31076, 3.31076, 3.31076, 3.31076, 0
] m
L_FlocBaffles = [
    1.38078, 1.38078, 1.38078, 1.38078, 1.59876;
    1.59876, 1.59876, 1.59876, 1.59876, 1.38078;
    1.38078, 1.38078, 1.38078, 1.38078, 1.59876;
    1.59876, 1.59876, 1.59876, 1.59876, 1.38078;
    1.38078, 1.38078, 1.38078, 1.38078, 1.59876;
    1.59876, 1.59876, 1.59876, 1.59876, 1.38078;
    1.38078, 1.38078, 1.38078, 1.38078, 1.59876;
    1.59876, 1.59876, 1.59876, 1.59876, 1.38078;
    1.38078, 1.38078, 1.38078, 1.38078, 1.59876;
    1.59876, 1.59876, 1.59876, 1.59876, 1.38078;
    1.38078, 1.38078, 1.38078, 1.38078, 1.59876;
    1.59876, 1.59876, 1.59876, 1.59876, 1.38078;
    1.38078, 1.38078, 1.38078, 1.38078, 1.59876;
    1.59876, 1.59876, 1.59876, 1.59876, 1.38078;
    1.38078, 1.38078, 1.38078, 1.38078, 1.59876;
    1.59876, 1.59876, 1.59876, 1.59876, 1.38078;
    1.38078, 1.38078, 1.38078, 1.38078, 1.59876;
    1.59876, 1.59876, 1.59876, 1.59876, 1.38078;
    1.38078, 1.38078, 1.38078, 1.38078, 0
] m
Z_FlocBaffles = [
    0, 0, 0, 0, 0.264782;
    0.256955, 0.256955, 0.256955, 0.256955, 0;
    0, 0, 0, 0, 0.264782;
    0.256955, 0.256955, 0.256955, 0.256955, 0;
    0, 0, 0, 0, 0.264782;
    0.256955, 0.256955, 0.256955, 0.256955, 0;
    0, 0, 0, 0, 0.264782;
    0.256955, 0.256955, 0.256955, 0.256955, 0;
    0, 0, 0, 0, 0.264782;
    0.256955, 0.256955, 0.256955, 0.256955, 0;
    0, 0, 0, 0, 0.264782;
    0.256955, 0.256955, 0.256955, 0.256955, 0;
    0, 0, 0, 0, 0.264782;
    0.256955, 0.256955, 0.256955, 0.256955, 0;
    0, 0, 0, 0, 0.264782;
    0.256955, 0.256955, 0.256955, 0.256955, 0;
    0, 0, 0, 0, 0.264782;
    0.256955, 0.256955, 0.256955, 0.256955, 0;
    0, 0, 0, 0, 0
] m
N_FlocChannels = 5
L_FlocTank = 17.5203 m
HL_Floc = 16.7987 cm
HW_FlocStart = 1.80572 m
S_FlocBaffle = [17.1303; 17.1303; 17.1303; 17.1303; 17.6521] cm
B_FlocBaffle = [17.3303; 17.3303; 17.3303; 17.3303; 17.8521] cm
N_FlocChannelBaffles = [19; 19; 19; 19; 18]
W_FlocPort = [0.171303; 0.171303; 0.171303; 0.171303; 0.18253] m
HL_FlocChannels = [3.43205; 3.43205; 3.43205; 3.43205; 3.07053] cm
L_FlocBaffleLower = 1.38078 m
L_FlocBaffleUpper = 1.59876 m
H_FlocPort = [0.54; 0.54; 0.54; 0.54; 0.522225] m
Ti_Floc = 21.5202 min  # residence time of the flocculator
N_FlocBaffles = 94
# Materials List:
N_Launders = 4
L_LaunderPipeTotal = 9.44446 m
N_Valves = 4
N_LaunderCouplings = 4
N_ValveCouplings = 4
N_SedPlatesTotal = 280
N_SedPlatesPerSheet = 6
N_SedPlateSheets = 47
AC_SedTank =  # no stored result
AC_EntranceTank = [
    "-layer m Cdc"; "c t 129,0,129"; "Cdc"; "  "; "-insert Float.dwg"; "-3.61201,10.25813,1.91793 0.90553 0.90553 0"; "-insert LeverArm.dwg"; "-3.57841,10.25813,2.31953 1 1 0"; "-insert Cht.dwg"; "-4.34061,10.17403,2.43723 1 1 0"
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]
AC_FlocTank = [
    "-layer m FlocTank";
    "c t 132,132,132";
    "FlocTank";
    "  ";
    "_-view o t _zoom w 0.16,4.76,0 -3.66406,8.38,1.90572 _box 0,4.92,0 -3.50406,8.22,1.90572 _box 0.15,4.77,-0.15 -3.65406,8.37,1.90572 _subtract 0.15,4.77,-0.15  0,4.92,0 ";
    "_box -3.65406,5.46,0 0.15,5.61,1.90572";
    "_box -3.65406,6.15,0 0.15,6.3,1.90572";
    "_box -3.65406,6.84,0 0.15,6.99,1.90572";
    "_box -3.65406,7.53,0 0.15,7.68,1.90572";
    "-group c FlocTank y "
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]
AC_ChemTanks =  # error: This variable is undefined.
AC_OperatorAccess = [
    "-layer m Walkway";
    "c t 132,132,132";
    "Walkway";
    "  ";
    "_box 0.15,0,1.23773 1.65,8.37,1.53773";
    "-group c Walkway y ";
    "all ";
    "-layer s 0";
    "  ";
    "-layer f Walkway";
    "  ";
    "_box 0.15,0.49174,1.23773 0.29478,0.58826,1.53773";
    "-array all  R 4 1 1.23";
    "_box 0.15,5.12968,1.23773 0.33098,5.25033,1.53773";
    "_box 0.15,6.50968,1.23773 0.33098,6.63033,1.53773";
    "_box 0.15,7.88968,1.23773 0.33098,8.01033,1.53773";
    "-group c DeleteMe y ";
    "all ";
    "-layer t Walkway";
    "  ";
    "_subtract";
    "g Walkway";
    " g DeleteMe ";
    "-layer f Walkway";
    "  "
]
AC_DrainChannel = [
    "-layer m DrainChannel"; "c t 214,214,214"; "DrainChannel"; "  "; "3dpoly"; "0.3,-0.40718,-0.2024"; "0.3,-0.40718,-0.26894"; "0.3,-0.00717,-0.48548"; "0.3,0.39283,-0.26894"; "0.3,0.39283,-0.2024"
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]
