# References
# Here we will reference the subprograms: Unit Processes, Hydraulic Design, AutoCAD, and Report Generator. In order to be able to transfer data from one subprogram to another we will need to be able to send and recieve everything through function calls.
# [reference: HydraulicDesign.xmcd]
# [reference: UnitProcesses.xmcd]
# Enter Values Here
# Plant Flow Rate
# [component: outputs Q_plantentered]
# [component: outputs units_flowrate]
# Choose either a Pipe Schedule Number or an SDR rating:
# [component: outputs PipeSpecification]
# Widths of:
# Flocculator
# [component: outputs width_flocentered]
# [component: outputs units_widths]
# Sedimentation Tank
# [component: outputs width_sedentered]
# Walkway
# [component: outputs walkway_widthentered]
# Thicknesses of:
# Channel:
# [component: outputs channel_thickentered]
# [component: outputs units_thicknesses]
# Tank:
# [component: outputs tank_thickentered]
# Leveling Tank:
# [component: outputs lvltank_thickentered]
# Grit Chamber:
# [component: outputs grit_thickentered]
# Platform:
# [component: outputs platform_thickentered]
# Stock Platform:
# [component: outputs stockplat_thickentered]
# Storage Drum Parameters:
# Radius:
# [component: outputs r_drumentered]
# [component: outputs units_drum]
# Height:
# [component: outputs h_drumentered]
# Distance from edge of platform:
# [component: outputs drum_dispentered]
# Dimensions of:
# Length: | Width: | Height:
# Columns under plant
# [component: outputs units_dims]
# [component: outputs column_length]
# [component: outputs column_width]
# [component: outputs column_height]
# Columns under stock platform
# [component: outputs stockplatcol_length]
# [component: outputs stockplatcol_width]
# [component: outputs stockplatcol_height]
# Converting Strings to Numbers with Units
str2decimalnumber(string) :=
    decimal_index ← search(string, ".", 0)
    str_length ← strlen(string)
    decimalnum ← str2num(string) if decimal_index == -1
    if decimal_index ≠ -1
        str1 ← substr(string, 0, decimal_index)
        char ← str_length - 1 - decimal_index
        str2 ← substr(string, decimal_index + 1, char)
        power ← strlen(str2)
        num1 ← str2num(str1) if str1 ≠ ""
        num1 ← 0 if str1 == ""
        num2 ← str2num(str2)/10^power if str2 ≠ ""
        num2 ← 0 if str2 == ""
        decimalnum ← num1 + num2
    return decimalnum
units(units) :=
    u ← 1 m if units == 0
    u ← 1*ft if units == 1
    return u
Qunits(units) :=
    u ← 1*L/min if units == 0
    u ← 1*L/day if units == 1
    u ← 1*gal/day if units == 2
    return u
Q_plant := str2decimalnumber(Q_plantentered)*Qunits(units_flowrate)
FlocTank_width := str2decimalnumber(width_flocentered)*units(units_widths)
SedTank_width := str2decimalnumber(width_sedentered)*units(units_widths)
channel_thick := str2decimalnumber(channel_thickentered)*units(units_thicknesses)
tank_thick := str2decimalnumber(tank_thickentered)*units(units_thicknesses)
lvltank_thick := str2decimalnumber(lvltank_thickentered)*units(units_thicknesses)
grit_thick := str2decimalnumber(grit_thickentered)*units(units_thicknesses)
stockplat_thick := str2decimalnumber(stockplat_thickentered)*units(units_thicknesses)
platform_thick := str2decimalnumber(platform_thickentered)*units(units_thicknesses)
walkway_width := str2decimalnumber(walkway_widthentered)*units(units_widths)
r_drum := str2decimalnumber(r_drumentered)*units(units_drum)
h_drum := str2decimalnumber(h_drumentered)*units(units_drum)
drum_disp := str2decimalnumber(drum_dispentered)*units(units_drum)
stockplatcol_dim := [
    str2decimalnumber(stockplatcol_length);
    str2decimalnumber(stockplatcol_width);
    str2decimalnumber(stockplatcol_height)
]*units(units_dims)
column_dim := [
    str2decimalnumber(column_length);
    str2decimalnumber(column_width);
    str2decimalnumber(column_height)
]*units(units_dims)
# Summary of Values Entered
Q_plant = 0.00219063 m^3/s
channel_thick = 0.5 m
FlocTank_width = 3 m
stockplatcol_dim = [0.3; 0.3; 0.75] m
grit_thick = 0.5 m
SedTank_width
PipeSpecification = 3
lvltank_thick = 0.5 m
walkway_width = 1 m
column_dim = [1; 1; 2] m
tank_thick = 0.5 m
r_drum = 0.5 m
stockplat_thick = 0.5 m
h_drum = 1 m
drum_disp = 0.25 m
platform_thick = 0.5 m
DataDump1 := UnitProcess(Q_plant, SedTank_width, FlocTank_width, r_drum, h_drum)
# convert stuff returned by unit process to stuff needed by hydraulic design, etc.
DataDump2 := HydraulicDesign(Q_plant, FlocTank_width, PipeSpecification, n_sedtanks, sedtank_dim, lamella_spacing, tank_thick, channel_thick)  # error: This variable is undefined.
